// COMSOL Multiphysics 6.2.0.339 model "SIM_lab_trifurcation_channel_comsol62.mph"
// Outline of the model tree

Parameters
  L = 6 [cm]
  Linlet = 6 [mm]
  H = 800 [um]
  Dc = 1*10^(-9)[m^2/s]

Geometry
  geom1 "Geometry 1" (2D, length unit m)
    r1: Rectangle | pos = {0, -H/2}; size = {L, H}
    r2: Rectangle | pos = {0, -H/2}; size = {Linlet, H}
    rot1: Rotate | input = r2; rot = -45; pos = {6e-3, 0}
    mir1: Mirror | input = rot1; keep = on; posconstr = {on, on}; axisconstr = {on, on}; axis = {0, 1}
    mir2: Mirror
      input = mir1, rot1
      keep = on
      posconstr = {on, on}
      axisconstr = {on, on}
      pos = {L/2, 0}
      axis = {1, 0}
    uni1: Union | input = mir1, mir2, r1, rot1; intbnd = off; edge = all
    fin: Finalize "Form Union"

Materials
  mat1: Common "Water, liquid" on all domains
    def "Basic"
      dynamicviscosity = eta(T[1/K])[Pa*s]
      ratioofspecificheat = 1.0
      electricconductivity = 5.5e-6[S/m]
      heatcapacity = Cp(T[1/K])[J/(kg*K)]
      density = rho(T[1/K])[kg/m^3]
      thermalconductivity = k(T[1/K])[W/(m*K)]
      soundspeed = cs(T[1/K])[m/s]
      eta: Piecewise
        arg = T
        pieces = 
          {273.15, 413.15, 1.3799566804-0.021224019151*T^1+1.3604562827E-4*T^2-4.6454090319E-7*T^3+8.9042735735E-10*T^4-9.0790692686E-13*T^5+3.8457331488E-16*T^6}
          {413.15, 553.75, 0.00401235783-2.10746715E-5*T^1+3.85772275E-8*T^2-2.39730284E-11*T^3}
      Cp: Piecewise | arg = T; pieces = {273.15, 553.75, 12010.1471-80.4072879*T^1+0.309866854*T^2-5.38186884E-4*T^3+3.62536437E-7*T^4}
      rho: Piecewise | arg = T; pieces = {273.15, 553.75, 838.466135+1.40050603*T^1-0.0030112376*T^2+3.71822313E-7*T^3}
      k: Piecewise | arg = T; pieces = {273.15, 553.75, -0.869083936+0.00894880345*T^1-1.58366345E-5*T^2+7.97543259E-9*T^3}
      cs: Interpolation | table = {{273, 1403}, {278, 1427}, {283, 1447}, {293, 1481}, {303, 1507}, {313, 1526}, {323, 1541}, {333, 1552}, {343, 1555}, {353, 1555}, {363, 1550}, {373, 1543}}; interp = piecewisecubic

Physics
  spf: LaminarFlow on all domains
    dependent variable u = {u, v, w}
    fp1: FluidProperties (default)
    init1: init "Initial Values 1" (default)
    wallbc1: WallBC "Wall 1" (default)
    inl1: InletBoundary "Inlet 1" on boundaries 1, 4, 6 | U0in = 1e-3 [m/s]
    out1: OutletBoundary "Outlet 1" on boundaries 18-20
  tds: DilutedSpecies "Transport of Diluted Species" on all domains
    dependent variable c
    cdm1: ConvectionDiffusionMigration "Transport Properties 1" (default)
      u_src = root.comp1.u
      DiffusionMaterialList = mat1
      D_c = Dc
    nflx1: NoFlux (default)
    init1: init "Initial Values 1" (default)
    in1: Inflow on boundaries 6 | c0 = 1
    in2: Inflow on boundaries 4 | c0 = 1
    out1: Outflow on boundaries 19
    out2: Outflow on boundaries 18
    out3: Outflow on boundaries 20

Mesh
  mesh1 "Mesh 1" (physics-controlled)
    size: MeshSizeDefault | table = cfd; hauto = 4

Studies
  std1 "Study 1"
    stat: Stationary
  std2 "Study 2"
    stat: Stationary

Solver configurations
  sol1 "Solution 1" (study std1)
    v1: Variables "Dependent Variables 1"
    s1: Stationary "Stationary Solver 1"
      fc1: FullyCoupled | linsolver = d1; initstep = 0.01; maxiter = 100
      d1: Direct "Direct, fluid flow variables (spf)" | linsolver = pardiso; pivotperturb = 1.0E-13

Datasets
  dset1: Solution | solution = sol1
  cln1: CutLine2D "Vertical Cut Line 2D" | data = dset1; genpoints = {{L/2, -H/2}, {L/2, H/2}}
  cln2: CutLine2D "Horizontal Cut Line 2D" | data = dset1; genpoints = {{0, 0}, {L, 0}}

Plots
  pg1: PlotGroup2D "Velocity (spf)" | data = dset1
    surf1: Surface | expr = spf.U
  pg2: PlotGroup2D "Pressure (spf)" | data = dset1
    con1: Contour | expr = p
  pg3: PlotGroup1D "Vertical Cut Line 2D" | data = cln1
    lngr1: LineGraph | expr = u
  pg4: PlotGroup1D "Horizontal Cut Line 2D" | data = cln2
    lngr1: LineGraph | expr = p