// COMSOL Multiphysics 6.3.0.420 model "Zigzag prototype 2.mph"
// Outline of the model tree

Parameters
  L = 1 [cm]
  H = 1 [mm]
  angle = 45
  alpha = angle*pi/180
  turns = 4

Geometry
  geom1 "Geometry 1" (2D, length unit m)
    r1: Rectangle | size = {L, H}; rot = angle
    dm1: DistanceMeasurement
      ent1 = r1(1) points 1
      ent2 = r1(1) points 2
      parname = geom1.dm1
      parnamevec = {geom1.dm1.x, geom1.dm1.y}
      parval = 0.01
      parvalvec = {0.00707106781187, 0.00707106781187}
    r2: Rectangle | size = {L, H}; pos = {geom1.dm1.x, geom1.dm1.y}; rot = -angle
    dm2: DistanceMeasurement
      ent1 = r1(1) points 1
      ent2 = r2(1) points 4
      parname = geom1.dm2
      parnamevec = {geom1.dm2.x, geom1.dm2.y}
      parval = 0.011
      parvalvec = {0.00777817459305, 0.00777817459305}
    dm3: DistanceMeasurement
      ent1 = r1(1) points 1
      ent2 = r1(1) points 3
      parname = geom1.dm3
      parnamevec = {geom1.dm3.x, geom1.dm3.y}
      parval = 0.0100498756211
      parvalvec = {0.00636396103068, 0.00777817459305}
    pol1: Polygon
      source = table
      table = 
        {geom1.dm3.x, geom1.dm3.y}
        {geom1.dm1.x, geom1.dm3.y+( (geom1.dm1.x-geom1.dm3.x)*tan(alpha) )}
        {geom1.dm2.x, geom1.dm3.y}
        {geom1.dm1.x, geom1.dm1.y}
    fil1: Fillet | point = pol1(1) points 3; radius = geom1.dm1.x-geom1.dm3.x
    uni1: Union | input = fil1; intbnd = off; edge = all
    dm4: DistanceMeasurement
      ent1 = r1(1) points 1
      ent2 = r2(1) points 2
      parname = geom1.dm4
      parnamevec = {geom1.dm4.x, geom1.dm4.y}
      parval = 0.0141421356237
      parvalvec = {0.0141421356237, 0}
    dm5: DistanceMeasurement
      ent1 = r2(1) points 2
      ent2 = r2(1) points 3
      parname = geom1.dm5
      parnamevec = {geom1.dm5.x, geom1.dm5.y}
      parval = 0.001
      parvalvec = {0.000707106781187, 0.000707106781187}
    arr1: Array
      input = r1, r2, uni1
      size = turns
      type = linear
      linearsize = turns
      displ = {geom1.dm4.x+2*geom1.dm5.x, 0}
    dm6: DistanceMeasurement
      ent1 = arr1(1,1) points 1
      ent2 = arr1(1,2) points 3
      parname = geom1.dm6
      parnamevec = {geom1.dm6.x, geom1.dm6.y}
      parval = 0.0148660687473
      parvalvec = {0.0148492424049, 0.000707106781187}
    pol2: Polygon
      source = table
      table = 
        {geom1.dm4.x, geom1.dm4.y}
        {geom1.dm6.x, geom1.dm6.y}
        {geom1.dm4.x+2*(geom1.dm6.x-geom1.dm4.x), geom1.dm4.y}
        {geom1.dm6.x, (geom1.dm6.x-geom1.dm4.x)*tan(-alpha)}
    fil2: Fillet | point = pol2(1) points 2; radius = geom1.dm6.x-geom1.dm4.x
    arr2: Array | input = fil2; size = turns; type = linear; linearsize = turns; displ = {geom1.dm4.x+2*geom1.dm5.x, 0}
    uni2: Union | input = arr1, arr2; intbnd = off; edge = all
    fin: Finalize "Form Union"

Materials
  mat1: Common "Water" on all domains
    def: def "Basic"
      thermalexpansioncoefficient = alpha_p(T)
      bulkviscosity = muB(T)
      dynamicviscosity = eta(T)
      ratioofspecificheat = gamma_w(T)
      electricconductivity = 5.5e-6[S/m]
      heatcapacity = Cp(T)
      density = rho(T)
      thermalconductivity = k(T)
      soundspeed = cs(T)
      eta: Piecewise
        arg = T
        pieces = 
          {273.15, 413.15, 1.3799566804-0.021224019151*T^1+1.3604562827E-4*T^2-4.6454090319E-7*T^3+8.9042735735E-10*T^4-9.0790692686E-13*T^5+3.8457331488E-16*T^6}
          {413.15, 553.75, 0.00401235783-2.10746715E-5*T^1+3.85772275E-8*T^2-2.39730284E-11*T^3}
        argunit = K
        fununit = Pa*s
      Cp: Piecewise | arg = T; pieces = {273.15, 553.75, 12010.1471-80.4072879*T^1+0.309866854*T^2-5.38186884E-4*T^3+3.62536437E-7*T^4}; argunit = K; fununit = J/(kg*K)
      rho: Piecewise
        arg = T
        smooth = contd1
        pieces = 
          {273.15, 293.15, 6.3092789034e-05*T^3-0.0603676398829*T^2+18.9229382407066*T-950.704055329848}
          {293.15, 373.15, 1.0335053319e-05*T^3-0.0133950656345*T^2+4.96928883266*T+432.257114008512}
        argunit = K
        fununit = kg/m^3
      k: Piecewise | arg = T; pieces = {273.15, 553.75, -0.869083936+0.00894880345*T^1-1.58366345E-5*T^2+7.97543259E-9*T^3}; argunit = K; fununit = W/(m*K)
      cs: Interpolation
        funcnametable = {cs, 1}
        table = {{273, 1403}, {278, 1427}, {283, 1447}, {293, 1481}, {303, 1507}, {313, 1526}, {323, 1541}, {333, 1552}, {343, 1555}, {353, 1555}, {363, 1550}, {373, 1543}}
        interp = piecewisecubic
        fununit = m/s
        argunit = K
      an1: Analytic | funcname = alpha_p; expr = -1/rho(T)*d(rho(T),T); args = T; fununit = 1/K; argunit = K
      an2: Analytic | funcname = gamma_w; expr = 1+(T/Cp(T))*(alpha_p(T)*cs(T))^2; args = T; fununit = 1; argunit = K
      an3: Analytic | funcname = muB; expr = 2.79*eta(T); args = T; fununit = Pa*s; argunit = K

Physics
  spf: LaminarFlow on all domains
    dependent variable u = {u, v, w}
    fp1: FluidProperties (default)
    init1: init "Initial Values 1" (default)
    wallbc1: WallBC "Wall 1" (default)
    inl1: InletBoundary "Inlet 1" on no boundaries
      BoundaryCondition = FullyDevelopedFlow
      FullyDevelopedFlowOption = Uav
      Uavfdf = 1 [mm/s]
    out1: OutletBoundary "Outlet 1" on no boundaries

Mesh
  mesh1 "Mesh 1" (physics-controlled)
    size: MeshSizeDefault | table = cfd; hauto = 4

Studies
  std1 "Study 1"
    stat: Stationary

Solver configurations
  sol1 "Solution 1" (study std1)
    v1: Variables "Dependent Variables 1"
    s1: Stationary "Stationary Solver 1"
      fc1: FullyCoupled
      d1: Direct "Direct, fluid flow variables (spf)"

Datasets
  dset1: Solution | solution = sol1

Plots
  pg1: PlotGroup2D "Velocity (spf)" | data = dset1
    surf1: Surface | expr = spf.U
  pg2: PlotGroup2D "Pressure (spf)" | data = dset1
    con1: Contour | expr = p; levelrounding = off
    surf1: Surface | expr = p